<?xml version="1.0"?>
<?xml-stylesheet type="text/xsl" href="http://jsbsim.sourceforge.net/JSBSim.xsl"?>
<fdm_config name="AIM - Simplified model of AMRAAM" version="2.0" release="ALPHA"
    xmlns:xsi="http://www.w3.org/2001/XMLSchema-instance"
    xsi:noNamespaceSchemaLocation="http://jsbsim.sourceforge.net/JSBSim.xsd">

    <fileheader>
        <author> Edvards Scukins</author>
        <filecreationdate> 2021-01-14 </filecreationdate>
        <version> $Revision: 1.0 $ </version>
        <description>
          Rough model of the DIRECT Missile. I took ogel model
        </description>
      <note>
        This model was created using publicly available data, publicly available
        technical reports, textbooks, and guesses. It contains no proprietary or
        restricted data. If this model has been validated at all, it would be
        only to the extent that it seems to "fly right", and that it possibly
        complies with published, publicly known, performance data (maximum speed,
        endurance, etc.). Thus, this model is meant for educational and entertainment
        purposes only.

        This simulation model is not endorsed by the manufacturer. This model is not
        to be sold.
      </note>

    </fileheader>

    <metrics>
        <wingarea unit="FT2"> 2.54 </wingarea>
        <wingspan unit="FT"> 0.9 </wingspan>
        <chord unit="FT"> 0.9 </chord>
        <htailarea unit="FT2"> 0 </htailarea>
        <htailarm unit="FT"> 0 </htailarm>
        <vtailarea unit="FT2"> 0 </vtailarea>
        <vtailarm unit="FT"> 0 </vtailarm>
        <location name="AERORP" unit="IN">
            <x> 33.08 </x>
            <y> 0 </y>
            <z> 0 </z>
        </location>
        <location name="EYEPOINT" unit="IN">
            <x> 0 </x>
            <y> 0 </y>
            <z> 0 </z>
        </location>
        <location name="VRP" unit="IN">
            <x> 31 </x>
            <y> 0 </y>
            <z> 0 </z>
        </location>
    </metrics>

    <mass_balance>
        <ixx unit="SLUG*FT2"> 0.66 </ixx>
        <iyy unit="SLUG*FT2"> 633 </iyy>
        <izz unit="SLUG*FT2"> 633 </izz>
        <emptywt unit="LBS"> 100 </emptywt>
        <location name="CG" unit="IN">
            <x> 31 </x>
            <y> 0 </y>
            <z> 0 </z>
        </location>
    </mass_balance>


    <ground_reactions>
      <!-- Not used - hold down model keeps vehicle in place -->
    </ground_reactions>

    <propulsion>
        <engine file="XLR99">
            <location unit="M">
                <x> 3.8 </x>
                <y> 0 </y>
                <z> 0 </z>
            </location>
            <orient unit="DEG">
                <roll> 0.0 </roll>
                <pitch> 0 </pitch>
                <yaw> 0 </yaw>
            </orient>
            <feed>0</feed>
            <feed>1</feed>
            <thruster file="xlr99_nozzle">
                <location unit="IN">
                    <x> 3.8 </x>
                    <y> 0 </y>
                    <z> 0 </z>
                </location>
                <orient unit="DEG">
                    <roll> 0.0 </roll>
                    <pitch> 0.0 </pitch>
                    <yaw> 0.0 </yaw>
                </orient>
            </thruster>
        </engine>
        <tank type="OXIDIZER">    <!-- Tank number 0 for Main engine -->
            <location unit="IN">
                <x> 3.7 </x>
                <y> 0 </y>
                <z> 0 </z>
            </location>
            <capacity unit="KG"> 12 </capacity>
            <contents unit="KG"> 12 </contents>
        </tank>
        <tank type="FUEL">    <!-- Tank number 1 for Main engine -->
            <location unit="M">
                <x> 3.7 </x>
                <y> 0 </y>
                <z> 0 </z>
            </location>
            <capacity unit="KG"> 12 </capacity>
            <contents unit="KG"> 12 </contents>
        </tank>
       </propulsion>


<flight_control name="FCS: AIM">

 <channel name="Pitch">
   <summer name="Pitch Trim Sum">
      <input>fcs/elevator-cmd-norm</input>
      <input>fcs/pitch-trim-cmd-norm</input>
      <clipto>
        <min> -1 </min>
        <max>  1 </max>
      </clipto>
   </summer>

   <aerosurface_scale name="Elevator Control">
      <input>fcs/pitch-trim-sum</input>
      <range>
        <min> -1.0 </min>
        <max>  1.0 </max>
      </range>
      <output>fcs/elevator-pos-rad</output>
   </aerosurface_scale>

  </channel>

  <channel name="Roll">
   <summer name="Roll Trim Sum">
      <input>fcs/aileron-cmd-norm</input>
      <input>fcs/roll-trim-cmd-norm</input>
      <clipto>
        <min> -1 </min>
        <max>  1 </max>
      </clipto>
   </summer>

   <aerosurface_scale name="Left Aileron Control">
      <input>fcs/roll-trim-sum</input>
      <range>
        <min> -1.0 </min>
        <max>  1.0 </max>
      </range>
      <output>fcs/left-aileron-pos-rad</output>
   </aerosurface_scale>

   <aerosurface_scale name="Right Aileron Control">
      <input>fcs/roll-trim-sum</input>
      <range>
        <min> -1.0 </min>
        <max>  1.0 </max>
      </range>
      <output>fcs/right-aileron-pos-rad</output>
   </aerosurface_scale>

  </channel>

  <channel name="Yaw">
   <summer name="Rudder Command Sum">
      <input>fcs/rudder-cmd-norm</input>
      <input>fcs/yaw-trim-cmd-norm</input>
      <limit>
        <min> -1.0 </min>
        <max>  1.0 </max>
      </limit>
   </summer>

   <aerosurface_scale name="Rudder Control">
      <input>fcs/rudder-command-sum</input>
      <range>
        <min> -1.0 </min>
        <max>  1.0 </max>
      </range>
      <output>fcs/rudder-pos-rad</output>
   </aerosurface_scale>

  </channel>

 </flight_control>


<aerodynamics>

<axis name="LIFT">

    <function name="aero/coefficient/CLalpha">
      <description>Lift_due_to_alpha</description>
      <product>
          <property>aero/qbar-psf</property>
          <property>metrics/Sw-sqft</property>
          <table>
            <independentVar lookup="row">aero/alpha-rad</independentVar>
            <tableData>
              -0.87 -0.045
              -0.69 -0.045
              -0.52 -0.045
              -0.34 -0.045
              -0.17 -0.045
               0.00  0.000
               0.17  0.045
               0.34  0.045
               0.52  0.045
               0.69  0.045
               0.87  0.045
            </tableData>
          </table>
      </product>
    </function>

  </axis>

<axis name="DRAG">

<function name="aero/coefficient/CDmach">
       <description>Drag_due_to_mach</description>
        <product>
          <property>aero/qbar-psf</property>
          <property>metrics/Sw-sqft</property>
          <table>
            <independentVar lookup="row">velocities/mach</independentVar>
            <tableData>
                0.00     0.002
                1.0      0.013
                2.0      0.013
                3.0      0.013
                4.0      0.014
                5.0      0.015
            </tableData>
          </table>
        </product>
    </function>

    <function name="aero/coefficient/CDde">
       <description>Drag_due_to_Elevator_Deflection</description>
       <product>
           <property>aero/qbar-psf</property>
           <property>metrics/Sw-sqft</property>
           <abs><property>fcs/elevator-pos-norm</property></abs>
           <value>0.01</value>
       </product>
    </function>


</axis>

<axis name="SIDE">
    <function name="aero/coefficient/CYb">
        <description>Side_force_due_to_beta</description>
        <product>
            <property>aero/qbar-psf</property>
            <property>metrics/Sw-sqft</property>
            <property>aero/beta-rad</property>
            <value>-0.2</value>
        </product>
    </function>
</axis>


<axis name="ROLL">

    <function name="aero/coefficient/Clda">
       <description>Roll_moment_due_to_aileron</description>
       <product>
          <property>aero/qbar-psf</property>
          <property>metrics/Sw-sqft</property>
          <property>metrics/bw-ft</property>
          <property>fcs/left-aileron-pos-rad</property>
          <table>
            <independentVar lookup="row">velocities/mach</independentVar>
            <tableData>
              0.0    0.001
            </tableData>
          </table>
       </product>
    </function>


  </axis>


<axis name="PITCH">


    <function name="aero/coefficient/Cmde">
       <description>Pitch_moment_due_to_elevator</description>
       <product>
          <property>aero/qbar-psf</property>
          <property>metrics/Sw-sqft</property>
          <property>metrics/cbarw-ft</property>
          <property>fcs/elevator-pos-rad</property>
          <table>
            <independentVar lookup="row">velocities/mach</independentVar>
            <tableData>
              0.0     1.1
            </tableData>
          </table>
       </product>
    </function>


  </axis>

  <axis name="YAW">
<function name="aero/coefficient/Cndr">
       <description>Yaw_moment_due_to_rudder</description>
       <product>
           <property>aero/qbar-psf</property>
           <property>metrics/Sw-sqft</property>
           <property>metrics/bw-ft</property>
           <property>fcs/rudder-pos-rad</property>
           <value>-0.1</value>
       </product>
    </function>
</axis>


 </aerodynamics>

    <!--output name="J246.csv" type="CSV" rate="10">
      <simulation> OFF </simulation>
      <atmosphere> ON </atmosphere>
      <massprops> ON </massprops>
      <aerosurfaces> OFF </aerosurfaces>
      <rates> ON </rates>
      <velocities> ON </velocities>
      <forces> ON </forces>
      <moments> ON </moments>
      <position> ON </position>
      <propulsion> ON </propulsion>
      <fcs> ON </fcs>
      <ground_reactions> OFF </ground_reactions>
      <coefficients> OFF </coefficients>
      <property>propulsion/engine[2]/thrust-lbs</property>
      <property>propulsion/engine[3]/thrust-lbs</property>
      <property>propulsion/engine[4]/thrust-lbs</property>
      <property>propulsion/engine[5]/thrust-lbs</property>
      <property>guidance/upper-stage-flight-flag-switch</property>
      <property>guidance/upper-stage-flight-flag</property>
      <property>guidance/executive/MET</property>
      <property>guidance/executive/current-mode</property>
      <property>propulsion/tank[2]/contents-lbs</property>
      <property>propulsion/tank[2]/priority</property>
      <property>propulsion/tank[3]/contents-lbs</property>
      <property>propulsion/tank[3]/priority</property>
    </output-->

</fdm_config>
